# Лабораторная работа 1
# Вариант 15
# Тюрин Святослав P34302
# Соболев Иван P34312
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# Метод Литвака-Ушакова
# Метод минимальных путей и сечений
#
# Рассматриваем только мостиковую часть системы (4, 5, 6, 7, 8, 9, 10, 11)
# Минимальные пути и сечения уже были найдены на предыдущем этапе
# Переиспользуем результат и построим непересекающееся множество путей и сечений
t := 0, 1 .. 10000
t := 0, 1 .. 10000
# Пути:
# Первое множество: {4, 5}, {7, 8}, {10, 11}
# Второе множество: {4. 6. 8}, {7, 9, 11}
# Третье множество: {7, 6, 5}, {10, 9, 8}
# Четвертое множество: {4, 6, 9, 11}
# Пятое множество: {10, 9, 6, 5}
λ := 2*10^-4
λ := 3*10^-4
p(t) := e^(-λ*t)
p(t) := e^(-λ*t)
p23(t) := p(t)^2
# Минимальные пути:
# {4, 5}, {7, 8}, {10, 11}, {4, 6, 8}, {7, 6, 5}, {7, 9, 11}, {10, 9, 8},
# {4, 6, 9, 11}, {10, 9, 6, 5}
p1213(t) := p(t)^2
# Рассчитаем для каждого вероятность безотказной работы:
# Оба моста
# Вероятность работоспособности минимальных путей из 2-х элементов (таких 3):
# Первое множество: 3 параллельных соединений из 2 элементов
p4710(t) := 1 - (1 - p(t))^3
p_2_nodes(t) := p(t)^2
p_2_nodes_3_parallel(t) := 1 - (1 - p_2_nodes(t))^3
p5811(t) := 1 - (1 - p(t))^3
p2b(t) := p(t)*p(t)*p4710(t)*p5811(t)
# Вероятность работоспособности минимальных путей из 3-х элементов (таких 4):
# Второе и третье множество: 2 параллельных соединений из 3 элементов
# Верхний мост
p_3_nodes(t) := p(t)^3
p_3_nodes_2_parallel(t) := 1 - (1 - p_3_nodes(t))^2
p47(t) := 1 - (1 - p(t))^2
# Чевертое. пятое - 1 соединение из 4 элементов
# Итого можем получить оценку снизу:
p58(t) := 1 - (1 - p(t))^2
# Вероятность работоспособности минимальных путей из 4-х элементов (таких 2):
ptopinner(t) := 1 - (1 - p47(t)*p58(t))*(1 - p(t)^2)
p_4_nodes(t) := p(t)^4
ptop(t) := p(t)*(1 - p(t))*ptopinner(t)
p_lower_bound_lu(t) := max(p_2_nodes_3_parallel(t)*p_3_nodes_2_parallel(t), p_4_nodes(t))
# Теперь можем рассчитать верхнюю границу вероятности работоспособности мостиковой
# системы:
# Нижний мост
p710(t) := 1 - (1 - p(t))^2
# Сечения:
# Первое множество: {4,7,10}, {5, 8, 12}
# Остальные все пересекаются
p_upper_bound(t) := 1 - (1 - p_2_nodes(t))^3*(1 - p_3_nodes(t))^4*(1 - p_4_nodes(t))^2
p811(t) := 1 - (1 - p(t))^2
pbottominner(t) := 1 - (1 - p710(t)*p811(t))*(1 - p(t)^2)
# Минимальные сечения:
# {4, 7, 10}, {5, 8, 11}, {4, 7, 9, 11}, {5, 8, 9, 10}, {5, 6, 7, 9, 11}, {4, 6, 8, 9, 11},
p_6_nodes(t) := 1 - (1 - p(t))^6
pbottom(t) := (1 - p(t))*p(t)*pbottominner(t)
# Без мостов
q(t) := 1 - p(t)
p_upper_bound_lu(t) := min(p_3_nodes(t)^2, p_4_nodes(t), p_6_nodes(t))
# Вероятность отказа минимальных сечений из 3-х элементов (таких 2):
p0binner(t) := 1 - (1 - p(t)^2)^3
q_3_nodes(t) := q(t)^3
p0b(t) := (1 - p(t))*(1 - p(t))*p0binner(t)  # Вероятность отказа минимальных сечений из 4-х элементов (таких 2):
pbridges(t) := ptop(t) + pbottom(t) + p2b(t) + p0b(t)
q_4_nodes(t) := q(t)^4
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# Вероятность отказа минимальных сечений из 5-х элементов (таких 2):
q_5_nodes(t) := q(t)^5
# Теперь можно рассчитать нижнюю границу вероятности работоспособности мостиковой
# системы:
p_lower_bound(t) := (1 - q_3_nodes(t))^2*(1 - q_4_nodes(t))^2*(1 - q_5_nodes(t))^2
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