# Исходные данные:
# Лабораторная работа 2
# Соболев Иван P34312
# Тюрин Святослав P34302
λ1 := 10^-4
λ2 := 10^-4
μ1 := 1
μ2 := 1
# Модель 1
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# Алгебраическое решение
Given
# Дифференциальное решение
-(2*λ1 + 2*λ2)*P0 + μ1*P1 + μ2*P2 == 0
-(λ1 + 2*λ2 + μ1)*P1 + 2*λ1*P0 + μ1*P4 + μ2*P3 == 0
-(2*λ1 + λ2 + μ2)*P2 + 2*λ2*P0 + μ1*P3 + μ2*P7 == 0
-(μ1 + μ2 + λ1 + λ2)*P3 + 2*λ2*P1 + 2*λ1*P2 + μ2*P5 + μ1*P6 == 0
-μ1*P4 + λ1*P1 == 0
p := [1; 0; 0; 0; 0; 0; 0; 0]
-μ2*P5 + λ2*P3 == 0
D(t, p) := [
    -(2*λ1 + 2*λ2)*p[0] + μ1*p[1] + μ2*p[2];
    -(λ1 + 2*λ2 + μ1)*p[1] + 2*λ1*p[0] + μ1*p[4] + μ2*p[3];
    -(2*λ1 + λ2 + μ2)*p[2] + 2*λ2*p[0] + μ1*p[3] + μ2*p[7];
    -(μ1 + μ2 + λ1 + λ2)*p[3] + 2*λ2*p[1] + 2*λ1*p[2] + μ2*p[5] + μ1*p[6];
    -μ1*p[4] + λ1*p[1];
    -μ2*p[5] + λ2*p[3];
    -μ1*p[6] + λ1*p[3];
    -μ2*p[7] + λ2*p[2]
]
-μ1*P6 + λ1*P3 == 0
-μ2*P7 + λ2*P2 == 0
P0 + P1 + P2 + P3 + P4 + P5 + P6 + P7 == 1
Z1 := rkfixed(p, 0, 100, 1000, D)
n := 1 .. 1000
a := Find(P0, P1, P2, P3, P4, P5, P6, P7) → [
    125000000000/125050010001;
    25000000/125050010001;
    25000000/125050010001;
    5000/125050010001;
    2500/125050010001;
    1/250100020002;
    1/250100020002;
    2500/125050010001
]
Z1 =  # no stored result
# Состояния работающей системы: 0, 1, 2, 3
# Коэффициент готовности:
k := a[0] + a[1] + a[2] + a[3]
k → 25005000/25005001
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# Модель 2
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p := [1; 0; 0; 0; 0]
D(t, p) := [
    -(2*λ1 + 2*λ2)*p[0] + μ2*p[2];
    -(2*λ2 + λ1)*p[1] + (2*λ1)*p[0] + μ2*p[3];
    -(2*λ1 + λ2 + μ2)*p[2] + (2*λ2)*p[0];
    -(μ2 + λ1 + λ2)*p[3] + (2*λ2)*p[1] + (2*λ1)*p[2];
    λ1*p[1] + (λ1 + λ2)*p[3] + λ2*p[2]
]
Z2 := rkfixed(p, 0, 100000, 100000, D)
n := 1 .. 100000
Z2 =  # no stored result
# Состояния работающей системы: 0, 1, 2, 3
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# Модель 3
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p := [1; 0; 0; 0; 0; 0; 0]
D(t, p) := [
    -(2*λ1 + 2*λ2)*p[0] + μ2*p[2];
    -(λ1 + 2*λ2)*p[1] + μ1*p[4] + μ1*p[3] + (2*λ1)*p[0];
    -(λ2 + 2*λ1 + μ2)*p[2] + 2*λ2*p[0];
    -(λ1 + λ2 + μ1)*p[3] + (2*λ2)*p[1] + (2*λ1)*p[2] + μ1*p[5];
    -μ1*p[4] + λ1*p[1];
    -μ1*p[5] + λ1*p[3];
    λ2*p[3] + λ2*p[2]
]
Z3 := rkfixed(p, 0, 100000, 100000, D)
n := 1 .. 100000
Z3 =  # no stored result
# Состояния работающей системы: 0, 1, 2, 3
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