Given  # Лабораторная работа 2
# Соболев Иван P34312
# Тюрин Святослав P34302
a1 ≡ 10^-4
a2 ≡ 10^-4
m1 ≡ 1.0
m2 ≡ 1
-(2*a1 + 2*a2)*p0 + m1*p1 + m2*p2 == 0
-(a1 + 2*a2 + m1)*p1 + 2*a1*p0 + m1*p4 + m2*p3 == 0
-(2*a1 + a2 + m2)*p2 + 2*a2*p0 + m1*p3 + m2*p7 == 0
-(m2 + m1 + a1 + a2)*p3 + 2*a2*p1 + 2*a1*p2 + m2*p5 + m1*p6 == 0
-m1*p4 + a1*p1 == 0
-m2*p5 + a2*p3 == 0
-m1*p6 + a1*p3 == 0
-m2*p7 + a2*p2 == 0
p0 + p1 + p2 + p3 + p4 + p5 + p6 + p7 == 1
A := Find(p0, p1, p2, p3, p4, p5, p6, p7) → [0.999600079992; 0.000199920015998; 0.000199920015998; 3.99840031997e-8; 1.99920015998e-8; 3.99840031997e-12; 3.99840031997e-12; 1.99920015998e-8]
# Первая система
Given
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P := [1; 0; 0; 0; 0; 0; 0; 0]
D(t, P) := [
    -(2*a1 + 2*a2)*P[0] + m1*P[1] + m2*P[2];
    -(a1 + 2*a2 + m1)*P[1] + 2*a1*P[0] + m1*P[4] + m2*P[3];
    -(2*a1 + a2 + m2)*P[2] + 2*a2*P[0] + m1*P[3] + m2*P[7];
    -(m2 + m1 + a1 + a2)*P[3] + 2*a2*P[1] + 2*a1*P[2] + m2*P[5] + m1*P[6];
    -m1*P[4] + a1*P[1];
    -m2*P[5] + a2*P[3];
    -m1*P[6] + a1*P[3];
    -m2*P[7] + a2*P[2]
]
Z := rkfixed(P, 0, 100, 1000, D)
n := 0 .. 1000
Z =  # no stored result
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# Вторая система
Given
P2 := [1; 0; 0; 0]
D2(t, P2) := [
    -(2*a1 + 2*a2)*P2[0] + m2*P2[2];
    -(a1 + 2*a2)*P2[1] + 2*a1*P2[0] + m1*P2[3];
    -(2*a1 + a2 + m2)*P2[2] + 2*a2*P2[0];
    -(m1 + a1 + a2)*P2[3] + 2*a2*P2[1] + 2*a1*P2[2]
]
Z2 := rkfixed(P2, 0, 100, 1000, D2)
n := 0 .. 1000
Z2 =  # no stored result
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# Третья система
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Given
P3 := [1; 0; 0; 0; 0; 0]
D3(t, P3) := [
    -(2*a1 + 2*a2)*P3[0] + m2*P3[2];
    -(a1 + 2*a2)*P3[1] + 2*a1*P3[0] + m1*P3[3] + m1*P3[4];
    -(2*a1 + a2 + m2)*P3[2] + 2*a2*P3[0];
    -(a1 + a2 + m1)*P3[3] + 2*a2*P3[1] + 2*a1*P3[2] + m1*P3[5];
    -m1*P3[4] + a1*P3[1];
    -m1*P3[5] + a1*P3[3]
]
Z3 := rkfixed(P3, 0, 100, 1000, D3)
n := 0 .. 1000
Z3 =  # no stored result
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