# Лабораторная работа 3
# Соболев Иван P34312
# Тюрин Святослав P34302
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# Задание - расчитать коэффициент готовности системы в зависимости от
# наличия ремонтников на элементах.
λ1 := 10^-4
λ2 := 2*10^-4
μ1 := 1
μ2 := 1.5
# Первый случай
# Расчет коэффициента готовности, когда у нас один ремонтник
Given
-P1*(2*λ2 + 4*λ1) + μ1*P2 + μ2*P6 == 0
-P2*(2*λ2 + 3*λ1 + μ1) + 4*λ1*P1 + μ1*P3 == 0
-P3*(2*λ2 + 2*λ1 + μ1) + 3*λ1*P2 + μ1*P4 == 0
-P4*(2*λ2 + λ1 + μ1) + 2*λ1*P3 + μ1*P5 == 0
-P5*(2*λ2 + μ1) + λ1*P4 == 0
-P6*(λ2 + 4*λ1 + μ2) + 2*λ2*P1 + μ1*P7 + μ2*P11 == 0
-P7*(λ2 + 3*λ1 + μ1) + 2*λ2*P2 + 4*λ1*P6 + μ1*P8 + μ2*P12 == 0
-P8*(λ2 + 2*λ1 + μ1) + 2*λ2*P3 + 3*λ1*P7 + μ1*P9 + μ2*P13 == 0
-P9*(λ2 + λ1 + μ1) + 2*λ2*P4 + 2*λ1*P8 + μ1*P10 + μ2*P14 == 0
-P10*(λ2 + μ1) + 2*λ2*P5 + λ1*P9 + μ2*P15 == 0
-P11*(4*λ1 + μ2) + λ2*P6 == 0
-P12*(3*λ1 + μ2) + λ2*P7 + 4*λ1*P11 == 0
-P13*(2*λ1 + μ2) + λ2*P8 + 3*λ1*P12 == 0
-P14*(λ1 + μ2) + λ2*P9 + 2*λ1*P13 == 0
P1 + P2 + P3 + P4 + P5 + P6 + P7 + P8 + P9 + P10 + P11 + P12 + P13 + P14 + P15 == 1
z := Find(P1, P2, P3, P4, P5, P6, P7, P8, P9, P10, P11, P12, P13, P14, P15) → [0.999333408932; 0.000399573486239; 1.19824106646e-7; 2.39552382761e-11; 2.39456600121e-15; 0.000266595493938; 2.66529745932e-7; 1.27911650908e-10; 3.51705937899e-14; 4.47570203108e-18; 3.55365894345e-8; 4.50047223624e-11; 2.60523576125e-14; 8.16251601926e-18; 1.14092800543e-21]
k1 := z[0] + z[1] + z[2] + z[3] + z[5] + z[6] + z[7] + z[8] → 0.999999964418
# Второй случай
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# На уровне серверов один ремонтник, на уровне коммутаторов еще один ремонтник
Given
-4*λ1*B0 + μ1*B1 == 0
-(μ1 + 3*λ1)*B1 + 4*λ1*B0 + μ1*B2 == 0
-(μ1 + 2*λ1)*B2 + 3*λ1*B1 + μ1*B3 == 0
-μ1*B4 + λ1*B3 == 0
B0 + B1 + B2 + B3 + B4 == 1
x := Find(B0, B1, B2, B3, B4) → [
    1250000000000000/1250500150030003;
    500000000000/1250500150030003;
    150000000/1250500150030003;
    30000/1250500150030003;
    3/1250500150030003
]
Given
-2*λ2*R0 + μ2*R1 == 0
-μ2*R2 + λ2*R1 == 0
R0 + R1 + R2 == 1
y := Find(R0, R1, R2) → [0.999733368889; 0.000266595565037; 3.55460753383e-8]
k2 := (x[0] + x[1] + x[2] + x[3])*(y[0] + y[1]) → 0.999999964454
# Третий случай
# Расчет коэффициента готовности, когда на каждый элемент по одному ремонтнику
# ks - коэффициент готовности сервера
# kc - коэффициент готовности коммутатора
ks := 1/λ1/(1/λ1 + 1/μ1)
kc := 1/λ2/(1/λ2 + 1/μ2)
k3 := sum(combin(4, i)*(ks^i*(1 - ks)^(4 - i)), i = 1 .. 4)*sum(combin(2, j)*kc^j*(1 - kc)^(2 - j), j = 1 .. 2) → 0.999999982227
