# Лабораторная работа 4
a1 ≡ 10^-4
# Соболев Иван P34312
# Тюрин Святослав P34302
a2 ≡ 10^-5
# Необходимо найти время восстановления и среднее время до отказа для двух случаев:
m1 ≡ 1.0
m2 ≡ 1.0
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# Первый случай
Given
-(m1 + a1 + 2*a2)*T1 + m2*T2 + m1*T0 == 0
-(m2 + a1 + a2)*T2 + 2*a2*T1 + m1*T3 + m2*T4 == 0
-m1*T0 + a1*T1 == -1
-m1*T3 + a1*T2 == 0
-m2*T4 + a2*T2 == 0
T == T0 + T1 + T2 + T3 + T4
Res := Find(T0, T1, T2, T3, T4, T) → [1.0001; 1.0; 0.00002; 2e-9; 2e-10; 2.0001200022]
Trecovery := Res[5]
# Время восстановления:
Trecovery = 2.00012
# Второй случай
Given
-(m1 + a1 + 2*a2)*T1 + m2*T2 + m1*T0 == 0
-(m2 + a1 + a2)*T2 + 2*a2*T1 + m1*T3 + m2*T4 == 0
-m1*T0 + a1*T1 == 0
-m1*T3 + a1*T2 == 0
-m2*T4 + a2*T2 == -1
T == T0 + T1 + T2 + T3 + T4
Res := Find(T0, T1, T2, T3, T4, T) → [0.0001; 1.0; 1.00002; 0.000100002; 1.0000100002; 3.0002300022]
Trecovery := Res[5]
# Время восстановления:
Trecovery = 3.00023
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# Нахождение среднего времени до отказа
Given
-2*(a1 + a2)*T0 + m2*T2 == -1
-(a1 + 2*a2)*T1 + 2*a1*T0 + m1*T3 == 0
-(2*a1 + a2 + m2)*T2 + 2*a2*T0 == 0
-(m1 + a1 + a2)*T3 + 2*a2*T1 + 2*a1*T2 == 0
T == T0 + T1 + T2 + T3
Res := Find(T0, T1, T2, T3, T) → [4999.89502425; 9999.77000957; 0.0999769053349; 0.199993396299; 14999.9650041]
MTTR := Res[4]
# Среднее время до отказа
MTTR = 15000
