# Лабораторная 6
# Соболев Иван P34312
# Тюрин Святослав P34302
λ := 10^-4
n_range := 1 .. 4
μ1 := 0.1
n := 4
μ2 := 1
μ3 := 2
μ4 := 5
μ := μ1
P_0(n) := sum((λ/μ)^i*(n!)/(n - i)!, i = 0 .. n)^-1
P_i(n, i) := P_0(n)*((λ/μ)^i*(n!)/(n - i)!)
K_G(n) := 1 - P_i(n, n)
K_G(n) = 1
P_i(n, n) = 2.39041e-11
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γ(n) := sum(P_i(n, i)*(i/μ), i = 0 .. n - 1)^-1
P_0_n(n) := sum((λ/μ)^i*(n - 1)!/(n - i - 1)!, i = 0 .. n - 1)
P_i_n(n, i) := P_0(n)*((λ/μ)^i*(n - 1)!/(n - i - 1)!)
γ(n) = 24.9502
Given
-λ*B1 + μ*B02 == 0
-μ*B02 + γ(n)*B01 == 0
B1 + B01 + B02 == 1
B := Find(B01, B1, B02) → [4.00397182074e-6; 0.998996999029; 0.000998996999029]
-γ*B01 + λ*B1 == 0
K_G_n(n) := sum(combin(n, i)*B[1]^i*(1 - B[1])^(n - i), i = 0 .. n)
K_G_n(n) = 1
K_G_n(n) - K_G(n) = 2.39041e-11
K_3 := (1/λ)/((1/λ) + (1/μ))
K_3 = 0.999001
K_G_3(n) := sum(combin(n, i)*K_3^i*(1 - K_3)^(n - i), i = 1 .. n)
K_G_3(n) = 1
K_G_n(n) - K_G_3(n) = 9.95981e-13
